*Heading
** Job name: hexContact_cae Model name: doubleContactModel
** Generated by: Abaqus/CAE 2017
*Preprint, echo=NO, model=NO, history=NO, contact=NO
**
** PARTS
**
*Part, name=SqrSheet
*Node
      1,         -50.,         -50.,           1.
      2,         -50.,        -47.5,           1.
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*Element, type=C3D8R
    1,   277,   278,   347,   346,     1,     2,    71,    70
    2,   278,   279,   348,   347,     2,     3,    72,    71
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*Nset, nset=allSheet_set, generate
     1,  19044,      1
*Elset, elset=allSheet_set, generate
     1,  13872,      1
*Nset, nset=TopBotEdgeSeeds-1
     1,     2,     3,     4,     5,     6
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*Elset, elset=TopBotEdgeSeeds-1
     1,     2,     3,     4,     5,     6
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** Section: alumSect
*Solid Section, elset=allSheet_set, material=aluminum_J2
,
*End Part
**
*Part, name=rod1
*Node
      1,          -8.,           0.,           0.
      2,           0.,          -8.,           0.
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*Element, type=C3D10M
   1,  561,  533,  562,  534,  801,  800,  799,  803,  802,  804
   2,  563,   90,  564,  219,  807,  806,  805,  809,  808,  810
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*Nset, nset=allRod1_set, generate
    1,  4956,     1
*Elset, elset=allRod1_set, generate
    1,  2800,     1
** Section: steelSect
*Solid Section, elset=allRod1_set, material=steel_J2
,
*End Part
**
*Part, name=rod2
*Node
      1,           0.,           0.,           0.
      2,           0.,          -5.,           0.
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*Element, type=C3D8I
  1, 124, 125, 166, 169,  11,  12,  53,  56
  2, 125, 126, 163, 166,  12,  13,  50,  53
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*Nset, nset=allRod2_set, generate
   1,  452,    1
*Elset, elset=allRod2_set, generate
   1,  288,    1
*Nset, nset=_PickedSet15, internal, generate
 340,  452,    1
*Elset, elset=_PickedSet15, internal, generate
 193,  288,    1
*Elset, elset=BottomUpElements1, generate
   1,  288,    1
** Section: steelSect
*Solid Section, elset=allRod2_set, material=steel_J2
,
*End Part
**
**
** ASSEMBLY
**
*Assembly, name=Assembly
**
*Instance, name=SqrSheet-1, part=SqrSheet
*End Instance
**
*Instance, name=rod1-1, part=rod1
          0.,           0.,          1.1
*End Instance
**
*Instance, name=rod2-1, part=rod2
          0.,           0.,         -2.1
*End Instance
**
*Elset, elset=allSheet_ElSet, instance=SqrSheet-1, generate
     1,  13872,      1
*Nset, nset=allSheet_NSet, instance=SqrSheet-1, generate
     1,  19044,      1
*Nset, nset=fixedCentBackRod2Node, instance=rod2-1
 1,
*Nset, nset=rod1Back, instance=rod1-1
   10,   11,   12,   13,   14,   19
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*Elset, elset=rod1Back, instance=rod1-1
   76,   89,   90,  107,  110,  147
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*Nset, nset=rod1Back_NSet, instance=rod1-1
   10,   11,   12,   13,   14,   19
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*Elset, elset=rod1_ElSet, instance=rod1-1, generate
    1,  2800,     1
*Nset, nset=rod2Back, instance=rod2-1, generate
   1,  113,    1
*Elset, elset=rod2Back, instance=rod2-1, generate
  1,  96,   1
*Nset, nset=rod2Back_NSet, instance=rod2-1, generate
   1,  113,    1
*Elset, elset=rod2_ElSet, instance=rod2-1, generate
   1,  288,    1
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*Elset, elset=rods12_ElSet, instance=rod1-1, generate
    1,  2800,     1
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*Nset, nset=sheetPerim, instance=SqrSheet-1
     1,     2,     3,     4,     5,     6
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*Elset, elset=_rod1_surf_S3, internal, instance=rod1-1
  100,  113,  180,  254,  421,  433
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*Elset, elset=_rod1_surf_S1, internal, instance=rod1-1
  358, 1170, 1314, 1573, 1632, 1697, 1699, 2303, 2626, 2685
*Elset, elset=_rod1_surf_S2, internal, instance=rod1-1
   99,  360, 1696, 1812, 1893, 1992
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*Elset, elset=_rod1_surf_S4, internal, instance=rod1-1
  172,  457,  490,  700, 1129, 1138
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*Surface, type=ELEMENT, name=rod1_surf
_rod1_surf_S3, S3
_rod1_surf_S1, S1
_rod1_surf_S2, S2
_rod1_surf_S4, S4
*Elset, elset=_rod2_surf_S1, internal, instance=rod2-1, generate
 193,  288,    1
*Surface, type=ELEMENT, name=rod2_surf
_rod2_surf_S1, S1
*Elset, elset=_sheetBot_surf_S5, internal, instance=SqrSheet-1
   137,   138,   139,   140,   141,   142
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*Surface, type=ELEMENT, name=sheetBot_surf
_sheetBot_surf_S5, S5
*Elset, elset=_sheetTop_surf_S3, internal, instance=SqrSheet-1
     1,     2,     3,     4,     5,     6
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*Surface, type=ELEMENT, name=sheetTop_surf
_sheetTop_surf_S3, S3
*End Assembly
*Amplitude, name=smoothStep, definition=SMOOTH STEP
             0.,              0.,              1.,              1.
**
** MATERIALS
**
*Material, name=aluminum_J2
*Damping, alpha=1.
*Density
 2.7e-09,
*Elastic
69000., 0.33
*Plastic
    118.,    0.
    120., 0.011
 128.703, 0.014
 135.129, 0.017
 141.317,  0.02
 147.275, 0.023
 153.012, 0.026
 162.105, 0.031
 170.643, 0.036
 178.659, 0.041
 186.186, 0.046
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 301.959, 1.011
*Material, name=steel_J2
*Damping, alpha=1.
*Density
 8.05e-09,
*Elastic
201000., 0.29
*Plastic
  341.62,          0.
 361.429, 0.000516825
 379.052,  0.00119394
 398.299,  0.00209043
 416.132,  0.00314734
 428.199,  0.00392398
 439.574,  0.00480765
 450.354,  0.00601506
 464.023,   0.0076578
 475.448,  0.00929489
  485.38,   0.0109273
 495.858,    0.012827
 504.894,   0.0148287
 512.509,   0.0169854
 520.375,   0.0195657
 525.074,   0.0219219
 529.845,   0.0243791
 534.029,    0.027148
 538.255,   0.0299622
 541.127,   0.0323973
 543.873,   0.0353002
 547.381,   0.0381432
 551.467,   0.0412928
 556.613,     0.04631
  571.22,   0.0616212
 585.965,   0.0780139
 598.865,   0.0935442
    625.,         0.5
    630.,          1.
**
** INTERACTION PROPERTIES
**
*Surface Interaction, name=IntProp1
*Surface Behavior, pressure-overclosure=HARD
** ----------------------------------------------------------------
**
** STEP: dynExplicit
**
*Step, name=dynExplicit, nlgeom=YES
*Dynamic, Explicit
, 1.
*Bulk Viscosity
0.06, 1.2
** Mass Scaling: Semi-Automatic
**               Whole Model
*Fixed Mass Scaling, factor=100000.
**
** BOUNDARY CONDITIONS
**
** Name: fixedBackRod1 Type: Symmetry/Antisymmetry/Encastre
*Boundary
rod1Back, ENCASTRE
** Name: fixedCenterBackRod2 Type: Displacement/Rotation
*Boundary
fixedCentBackRod2Node, 1, 1
fixedCentBackRod2Node, 2, 2
fixedCentBackRod2Node, 4, 4
fixedCentBackRod2Node, 5, 5
fixedCentBackRod2Node, 6, 6
** Name: fixedSheetPerim Type: Symmetry/Antisymmetry/Encastre
*Boundary
sheetPerim, ENCASTRE
** Name: moveRod2 Type: Displacement/Rotation
*Boundary, amplitude=smoothStep
rod2Back, 3, 3, 1.
**
** INTERACTIONS
**
** Interaction: rod1_sheet_contact
*Contact Pair, interaction=IntProp1, mechanical constraint=PENALTY, cpset=rod1_sheet_contact
rod1_surf, sheetTop_surf
** Interaction: rod2_sheet_contact
*Contact Pair, interaction=IntProp1, mechanical constraint=PENALTY, cpset=rod2_sheet_contact
rod2_surf, sheetBot_surf
**
** OUTPUT REQUESTS
**
*Restart, write, number interval=1, time marks=NO
**
** FIELD OUTPUT: F-Output-1
**
*Output, field, number interval=5
*Node Output
A, COORD, RF, U, V
*Element Output, directions=YES
LE, PE, PEEQ, S, COORD
*Contact Output
CSTRESS,
**
** HISTORY OUTPUT: H-Output-2
**
*Output, history
*Contact Output, cpset=rod1_sheet_contact
CFN1, CFN2, CFN3, CFNM
**
** HISTORY OUTPUT: H-Output-3
**
*Contact Output, cpset=rod2_sheet_contact
CFN1, CFN2, CFN3, CFNM
**
** HISTORY OUTPUT: H-Output-1
**
*Output, history, variable=PRESELECT
*End Step
